R := .082*liter*atm/(K*mol)
# El equipo del esquema se utilizó para evaluar la efciencia un nuevo material para el desarrollo de una membrana separadora de CO2  de una mezcla CO2 y O2 en escala laboratorio. El último punto medido parece estar por fuera de lo esperado y se sospecha de un problema experimental.
# La membrana debería separar la corriente de entrada en na corriente pura de CO2 que contiene el 90% del CO2 ingresado y una corriente de mezcla de O2 y el CO2 no separado.
#
# Lo primero que se notó es que la corriente 2 no tiene metano sin reaccionar y que la corriente 4 no tiene oxigeno por lo que tanto el reactor como la membrana funcionan correctamente.
#
# Para determinar si alguno  de las mediciones realizadas tiene un error, realizar los balances en los tres volúmenes de control posibles.
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# 90 % de eficiencia en la separación
# Condiciones en el punto 1
P_1 := 4 atm
T_1 := 298 K
Q1_ch4 := 1*mol/hr
Q1v_ch4 := Q1_ch4*R*T_1/P_1 = 0.101817 L/min
Q1_o2 := 2.5*mol/hr
Q1v_o2 := Q1_o2*R*T_1/P_1 = 0.254542 L/min
Q1 := Q1_ch4 + Q1_o2 = 3.5 mol/hr
Q1v := Q1*R*T_1/P_1 = 0.356358 L/min
x1_ch4 := Q1_ch4/Q1 = 0.285714
x1_o2 := Q1_o2/Q1 = 0.714286
# Condiciones en el punto 2
P_2 := 3 atm
T_2 := 300 K
Q2_co2 := Q1_ch4 = 1 mol/hr
Q2v_co2 := Q2_co2*R*T_2/P_2 = 0.136667 L/min
P_1 := 4 atm
T_1 := 298 K
Q2_o2 := Q1_o2 - 2*Q1_ch4 = 0.5 mol/hr
Q2v_o2 := Q2_o2*R*T_2/P_2 = 0.0683333 L/min
Q1v_ch4 = 0.101817 L/min  # Caudal de metano puro en la alimentación
Q2_h2o := 2*Q2_co2 = 2 mol/hr
Q1v_o2 = 0.254542 L/min  # Caudal de oxígeno puro en la alimentación
Q2v_h2o := Q2_h2o*R*T_2/P_2 = 0.273333 L/min
Q2 := Q2_co2 + Q2_o2 + Q2_h2o = 3.5 mol/hr
Q2v := Q2*R*T_2/P_2 = 0.478333 L/min
P_2 = 3 atm
T_2 = 300 K
x2_co2 := Q2_co2/Q2 = 0.285714
Q2v = 0.478333 L/min  # Caudal total antes del adsobedor
x2_o2 := Q2_o2/Q2 = 0.142857
x2_co2 = 0.285714  # Fracción molar de CO2 antes del adsobedor
x2_h2o := Q2_h2o/Q2 = 0.571429
x2_o2 = 0.142857  # Fracción molar de O2 antes del adsobedor
# Condiciones en el punto 3
x2_h2o = 0.571429  # Fracción molar de agua antes del adsobedor
P_3 := 1 atm
T_3 := 300 K
Q4_co2 := Q2_co2*.9 = 0.9 mol/hr
Q4v := Q4_co2*R*T_3/P_3 = 0.369 L/min
Q3 := Q2_o2 + 0.1*Q2_co2 = 0.6 mol/hr
Q3v := Q3*R*T_3/P_3 = 0.246 L/min  # Caudal O2 + CO2 salida
# Caudal CO2 puro salida
# Fracción molar de CO2 puro salida
P_3 = 1 atm
Q34 := Q4_co2 + Q3 = 1.5 mol/hr
Q34v := Q34*R*T_3/P_3 = 0.615 L/min
T_3 = 300 K
Q3v = 0.246 L/min
x3_co2 := 0.1*Q2_co2/Q3 = 0.166667
Q4v = 0.369 L/min  # Fracción molar de O2 corriente 3 salida
x3_co2 = 0.166667
x3_o2 := Q2_o2/Q3 = 0.833333
x3_o2 = 0.833333
# Balance en el volumen de control 1
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# Balance de carbono | Balance O
Q1_ch4 - Q2_co2 = 0 mol/s
Q1_o2*2 - Q2_co2*2 - Q2_o2*2 - Q2_h2o = 0 mol/s
# Balance H
Q1_ch4*4 - Q2_h2o*2 = 0 mol/s
# Balance en el volumen de control 2
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# Balance de carbono
Q2_co2 - Q4_co2 - Q3*x3_co2 = -6.77626e-21 mol/s
# Balance O
Q2_o2*2 + Q2_co2*2 - Q4_co2*2 - Q3*x3_o2*2 - Q3*x3_co2*2 = -1.35525e-20 mol/s
# Balance en el volumen de control 3
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# Balance de carbono
Q1_ch4 - Q4_co2 - Q3*x3_co2 = -6.77626e-21 mol/s
# Balance O
Q1_o2*2 - Q4_co2*2 - Q3*x3_o2*2 - Q3*x3_co2*2 - Q2_h2o = 0 mol/s
# Mala medición de la composición de la corriente 3
# Condiciones en el punto 3
P_3 := 1 atm
P_1 := 4 atm
T_1 := 298 K
T_3 := 300 K
Q1v_ch4 = 0.101817 L/min  # Caudal de metano puro en la alimentación
Q4_co2 := Q2_co2*.9 = 0.9 mol/hr
Q3v_co2 := Q4_co2*R*T_3/P_3 = 0.369 L/min
Q1v_o2 = 0.254542 L/min  # Caudal de oxígeno puro en la alimentación
Q3 := Q2_o2 + 0.1*Q2_co2 = 0.6 mol/hr
Q3v_o2 := Q3*R*T_3/P_3 = 0.246 L/min
P_2 = 3 atm
T_2 = 300 K
Q2v = 0.478333 L/min  # Caudal total antes del adsobedor
Q34 := Q4_co2 + Q3 = 1.5 mol/hr
Q34v := Q34*R*T_3/P_3 = 0.615 L/min
x2_co2 = 0.285714
# Fracción molar de CO2 antes del adsobedor
x2_o2 = 0.142857  # Fracción molar de O2 antes del adsobedor
x3_co2 := 0.1*Q2_co2/Q3 = 0.166667
x2_h2o = 0.571429
# Fracción molar de agua antes del adsobedor
P_3 = 1 atm
P_4 := P_3
T_3 = 300 K
T_4 := T_3
x3_o2 := Q2_o2/Q3 = 0.833333
Q3v = 0.246 L/min  # Caudal O2 + CO2 salida
x3t_co2 := .2
x3t_o2 := .8
Q4v = 0.369 L/min  # Caudal CO2 puro salida
x3_co2 := 0.2
# Fracción molar de CO2 puro salida
x3_o2 := 0.8  # Fracción molar de O2 corriente 3 salida
# Balance en el volumen de control 1
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# Balance de carbono
Q1_ch4 - Q2_co2 = 0 mol/hr
# Balance O
Q1_o2*2 - Q2_co2*2 - Q2_o2*2 - Q2_h2o = 0 mol/s
# Balance H
Q1_ch4*4 - Q2_h2o*2 = 0 mol/hr
# Balance en el volumen de control 2
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# Balance de carbono
Q2_co2 - Q4_co2 - Q3*x3t_co2 = -0.02 mol/hr
# Balance O
Q2_o2*2 + Q2_co2*2 - Q4_co2*2 - Q3*x3t_o2*2 - Q3*x3t_co2*2 = -4.06576e-20 mol/s
# Balance en el volumen de control 3
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# Balance de carbono
Q1_ch4 - Q4_co2 - Q3*x3t_co2 = -0.02 mol/hr
# Balance O
Q1_o2*2 - Q4_co2*2 - Q3*x3t_o2*2 - Q3*x3t_co2*2 - Q2_h2o = -3.90313e-16 mol/hr
