R := .082*liter*atm/(K*mol)
# El equipo del esquema se utilizó para evaluar la efciencia un nuevo material para el desarrollo de una membrana separadora de CO2  de una mezcla CO2 y O2 en escala laboratorio. El último punto medido parece estar por fuera de lo esperado y se sospecha de un problema experimental.
# La membrana debería separar la corriente de entrada en na corriente pura de CO2 que contiene el 90% del CO2 ingresado y una corriente de mezcla de O2 y el CO2 no separado.
#
# Lo primero que se notó es que la corriente 2 no tiene metano sin reaccionar y que la corriente 4 no tiene oxigeno por lo que tanto el reactor como la membrana funcionan correctamente.
#
# Para determinar si alguno  de las mediciones realizadas tiene un error, realizar los balances en los tres volúmenes de control posibles.
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# 90 % de eficiencia en la separación
# Condiciones en el punto 1
P_1 := 4 atm
T_1 := 298 K
Q1_ch4 := 1*mol/hr
Q1v_ch4 := Q1_ch4*R*T_1/P_1 = 0.101817 L/min
Q1_o2 := 3*mol/hr
Q1v_o2 := Q1_o2*R*T_1/P_1 = 0.30545 L/min
Q1 := Q1_ch4 + Q1_o2 = 4 mol/hr
Q1v := Q1*R*T_1/P_1 = 0.407267 L/min
x1_ch4 := Q1_ch4/Q1 = 0.25
x1_o2 := Q1_o2/Q1 = 0.75
# Condiciones en el punto 2
P_2 := 3 atm
T_2 := 300 K
Q2_co2 := Q1_ch4 = 1 mol/hr
Q2v_co2 := Q2_co2*R*T_2/P_2 = 0.136667 L/min
P_1 := 4 atm
T_1 := 298 K
Q2_o2 := Q1_o2 - 2*Q1_ch4 = 1 mol/hr
Q2v_o2 := Q2_o2*R*T_2/P_2 = 0.136667 L/min
Q1v_ch4 = 0.101817 L/min  # Caudal de metano puro en la alimentación
Q2_h2o := 2*Q2_co2 = 2 mol/hr
Q1v_o2 = 0.30545 L/min  # Caudal de oxígeno puro en la alimentación
Q2v_h2o := Q2_h2o*R*T_2/P_2 = 0.273333 L/min
Q2 := Q2_co2 + Q2_o2 + Q2_h2o = 4 mol/hr
Q2v := Q2*R*T_2/P_2 = 0.546667 L/min
P_2 = 3 atm
T_2 = 300 K
x2_co2 := Q2_co2/Q2 = 0.25
Q2v = 0.546667 L/min  # Caudal total antes del adsobedor
x2_o2 := Q2_o2/Q2 = 0.25
x2_co2 = 0.25  # Fracción molar de CO2 antes del adsobedor
x2_h2o := Q2_h2o/Q2 = 0.5
x2_o2 = 0.25  # Fracción molar de O2 antes del adsobedor
# Condiciones en el punto 3
x2_h2o = 0.5  # Fracción molar de agua antes del adsobedor
P_3 := 1 atm
T_3 := 300 K
Q4_co2 := Q2_co2*.9 = 0.9 mol/hr
Q4v := Q4_co2*R*T_3/P_3 = 0.369 L/min
Q3 := Q2_o2 + 0.1*Q2_co2 = 1.1 mol/hr
Q3v := Q3*R*T_3/P_3 = 0.451 L/min
P_3 = 1 atm
Q34 := Q4_co2 + Q3 = 2 mol/hr
Q34v := Q34*R*T_3/P_3 = 0.82 L/min
T_3 = 300 K
Q3v = 0.451 L/min  # Caudal O2 + CO2 salida
x3_co2 := 0.1*Q2_co2/Q3 = 0.0909091
Q4v = 0.369 L/min  # Caudal CO2 puro salida
x3_co2 = 0.0909091  # Fracción molar de CO2 puro salida
x3_o2 := Q2_o2/Q3 = 0.909091
x3_o2 = 0.909091  # Fracción molar de O2 corriente 3 salida
# Balance en el volumen de control 1
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# Balance de carbono | Balance O
Q1_ch4 - Q2_co2 = 0 mol/s
Q1_o2*2 - Q2_co2*2 - Q2_o2*2 - Q2_h2o = -1.0842e-19 mol/s
# Balance H
Q1_ch4*4 - Q2_h2o*2 = 0 mol/s
# Balance en el volumen de control 2
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# Balance de carbono
Q2_co2 - Q4_co2 - Q3*x3_co2 = -3.38813e-21 mol/s
# Balance O
Q2_o2*2 + Q2_co2*2 - Q4_co2*2 - Q3*x3_o2*2 - Q3*x3_co2*2 = -1.15196e-19 mol/s
# Balance en el volumen de control 3
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# Balance de carbono
Q1_ch4 - Q4_co2 - Q3*x3_co2 = -3.38813e-21 mol/s
# Balance O
Q1_o2*2 - Q4_co2*2 - Q3*x3_o2*2 - Q3*x3_co2*2 - Q2_h2o = 0 mol/s
# Mido bien el caudal de O2 pero mal el caudal de CH4
# Caso 1
# Datos:
P_1 := 4 atm
T_1 := 298 K
Q1v_ch4 = 0.101817 L/min  # Caudal de metano puro en la alimentación
Q1v_o2 = 0.30545 L/min  # Caudal de oxígeno puro en la alimentación
P_2 = 3 atm
T_2 = 300 K
Q2v = 0.546667 L/min  # Caudal total antes del adsobedor
x2_co2 = 0.25  # Fracción molar de CO2 antes del adsobedor
x2_o2 = 0.25  # Fracción molar de O2 antes del adsobedor
x2_h2o = 0.5  # Fracción molar de agua antes del adsobedor
P_3 = 1 atm
P_4 := P_3
T_3 = 300 K
T_4 := T_3
Q3v = 0.451 L/min  # Caudal O2 + CO2 salida
Q4v = 0.369 L/min  # Caudal CO2 puro salida
x3_co2 = 0.0909091  # Fracción molar de CO2 puro salida
x3_o2 = 0.909091  # Fracción molar de O2 corriente 3 salida
Q1t_ch4 := 1.3*mol/hr
Q1tv_ch4 := Q1t_ch4*R*T_1/P_1 = 0.132362 L/min
# Balance en el volumen de control 1
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# Balance de carbono
Q1t_ch4 - Q2_co2 = 0.3 mol/hr  # Mido bien el caudal de O2 pero mal el caudal de CH4
# Balance O
Q1_o2*2 - Q2_co2*2 - Q2_o2*2 - Q2_h2o = -1.0842e-19 mol/s
# Balance H
Q1t_ch4*4 - Q2_h2o*2 = 1.2 mol/hr  # Mido bien el caudal de O2 pero mal el caudal de CH4
# Balance en el volumen de control 2
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# Balance de carbono
Q2_co2 - Q4_co2 - Q3*x3_co2 = -3.38813e-21 mol/s
# Balance O
Q2_o2*2 + Q2_co2*2 - Q4_co2*2 - Q3*x3_o2*2 - Q3*x3_co2*2 = -1.15196e-19 mol/s
# Balance en el volumen de control 3
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# Balance de carbono
Q1t_ch4 - Q4_co2 - Q3*x3_co2 = 0.3 mol/hr
# Balance O
Q1_o2*2 - Q4_co2*2 - Q3*x3_o2*2 - Q3*x3_co2*2 - Q2_h2o = 0 mol/s
# Mido mal el caudal total en 2
# Condiciones en el punto 2
P_2 := 3 atm
T_2 := 300 K
Q2_co2 := Q1_ch4 = 1 mol/hr
Q2v_co2 := Q2_co2*R*T_2/P_2 = 0.136667 L/min
Q2_o2 := Q1_o2 - 2*Q1_ch4 = 1 mol/hr
Q2v_o2 := Q2_o2*R*T_2/P_2 = 0.136667 L/min
Q2_h2o := 2*Q2_co2 = 2 mol/hr
Q2v_h2o := Q2_h2o*R*T_2/P_2 = 0.273333 L/min
Q2 := Q2_co2 + Q2_o2 + Q2_h2o = 4 mol/hr
Q2v := Q2*R*T_2/P_2 = 0.546667 L/min
x2_co2 := Q2_co2/Q2 = 0.25
x2_o2 := Q2_o2/Q2 = 0.25
x2_h2o := Q2_h2o/Q2 = 0.5
Q2t := 5*mol/hr
Q2t_co2 := Q2t*x2_co2 = 1.25 mol/hr
Q2t_o2 := Q2t*x2_o2 = 1.25 mol/hr
Q2t_h2o := Q2t*x2_h2o = 2.5 mol/hr
# Balance en el volumen de control 1
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# Balance de carbono
Q1_ch4 - Q2t_co2 = -0.25 mol/hr  # Mido mal el caudal total en 2
# Balance O
Q1_o2*2 - Q2_co2*2 - Q2t_o2*2 - Q2t_h2o = -1 mol/hr
# Mido mal el caudal total en 2
# Balance H
Q1_ch4*4 - Q2t_h2o*2 = -1 mol/hr  # Mido mal el caudal total en 2
# Balance en el volumen de control 2
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# Balance de carbono
Q2t_co2 - Q4_co2 - Q3*x3_co2 = 0.25 mol/hr  # Mido mal el caudal total en 2
# Balance O
Q2t_o2*2 + Q2t_co2*2 - Q4_co2*2 - Q3*x3_o2*2 - Q3*x3_co2*2 = 1 mol/hr
# Mido mal el caudal total en 2
# Balance en el volumen de control 3
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# Balance de carbono
Q1_ch4 - Q4_co2 - Q3*x3_co2 = -3.38813e-21 mol/s
# Balance O
Q1_o2*2 - Q4_co2*2 - Q3*x3_o2*2 - Q3*x3_co2*2 - Q2_h2o = 0 mol/s
# Mala medición de la composición de la corriente 3
# Condiciones en el punto 3
P_3 := 1 atm
T_3 := 300 K
Q4_co2 := Q2_co2*.9 = 0.9 mol/hr
Q3v_co2 := Q4_co2*R*T_3/P_3 = 0.369 L/min
Q3 := Q2_o2 + 0.1*Q2_co2 = 1.1 mol/hr
Q3v_o2 := Q3*R*T_3/P_3 = 0.451 L/min
Q34 := Q4_co2 + Q3 = 2 mol/hr
Q34v := Q34*R*T_3/P_3 = 0.82 L/min
x3_co2 := 0.1*Q2_co2/Q3 = 0.0909091
x3_o2 := Q2_o2/Q3 = 0.909091
x3t_co2 := .2
x3t_o2 := .8
# Balance en el volumen de control 1
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# Balance de carbono
Q1_ch4 - Q2_co2 = 0 mol/hr
# Balance O
Q1_o2*2 - Q2_co2*2 - Q2_o2*2 - Q2_h2o = -1.0842e-19 mol/s
# Balance H
Q1_ch4*4 - Q2_h2o*2 = 0 mol/hr
# Balance en el volumen de control 2
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# Balance de carbono
Q2_co2 - Q4_co2 - Q3*x3t_co2 = -0.12 mol/hr
# Balance O
Q2_o2*2 + Q2_co2*2 - Q4_co2*2 - Q3*x3t_o2*2 - Q3*x3t_co2*2 = -1.89735e-19 mol/s
# Balance en el volumen de control 3
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# Balance de carbono
Q1_ch4 - Q4_co2 - Q3*x3t_co2 = -0.12 mol/hr
# Balance O
Q1_o2*2 - Q4_co2*2 - Q3*x3t_o2*2 - Q3*x3t_co2*2 - Q2_h2o = -3.90313e-16 mol/hr
