# Propiedades del agua
ρ := 1*gm/mL
μ := .01*poise
cp := 1*cal/(gm*K)
k := .58*W/(m*K)
# Geometría del sistema
A_p := 1 m^2
A_t := 1 m^2
S := 400 cm^2
de := S/((40 cm + 1 cm)*2) = 4.87805 cm
# Condiciones de operación
Q_f := 10*liter/min
Q_c := 20*liter/min
v_f := Q_f/S = 0.00416667 m/s
v_c := Q_c/S = 0.00833333 m/s
t_i := 298 K  # temperatura inicial del agua
# Datos de la resistencia
Pot := 2 A*220*V = 440 W
# Adimnsionales
Re_c := ρ*v_c*de/μ = 406.504
Re_f := ρ*v_f*de/μ = 203.252
Pr := k/(μ*cp) = 0.138531
# Calculo U
a := .2883
b := 0.657
c := 1/3
h_f := k/de*a*Re_f^b*Pr^c
h_c := k/de*a*Re_c^b*Pr^c
U := (1/h_f + 1/h_c)^-1
# Reuslevo para ressitencia eléctrica
# Balance de calor corriente fría
(t_f - t_i)*cp*ρ*Q_f == Pot
t_f := (Pot + Q_f*ρ*cp*t_i)/(ρ*Q_f*cp) = 298.631 K
# Balance de la corriente caliente
(T_i - T_f)*cp*ρ*Q_c == Pot
T_i == (Pot + Q_c*T_f*ρ*cp)/(Q_c*ρ*cp)
T_i := (Pot + Q_c*0*K*ρ*cp)/(Q_c*ρ*cp) = 0.315277 K
# Intercambiador
ρ*Q_c*cp*(T_i - T_f) == U*A_p*((T_i - t_f) - (T_f - t_i))/ln((T_i - t_f)/(T_f - t_i))
ρ*Q_c*cp*(T_i - T_f) == U*A_p*((T_i - t_f) - (T_f - t_i))/ln((T_i - t_f)/(T_f - t_i))
Pot == (A_p*Pot*U - A_p*Q_c*U*ρ*cp*t_f + A_p*Q_c*U*ρ*cp*t_i)/(Q_c*ρ*cp*ln((Pot + Q_c*T_f*ρ*cp - Q_c*ρ*cp*t_f)/(Q_c*T_f*ρ*cp - Q_c*ρ*cp*t_i)))
# Reemplazo
T_i == (Pot + Q_c*T_f*ρ*cp)/(Q_c*ρ*cp)
Pot == (A_p*Pot*U - A_p*Q_c*U*ρ*cp*t_f + A_p*Q_c*U*ρ*cp*t_i)/(Q_c*ρ*cp*ln((Pot + Q_c*T_f*ρ*cp - Q_c*ρ*cp*t_f)/(Q_c*T_f*ρ*cp - Q_c*ρ*cp*t_i)))
-(Pot - Q_c*ρ*cp*t_f + Q_c*ρ*cp*t_i*e^((A_p*Pot*U - A_p*Q_c*U*ρ*cp*t_f + A_p*Q_c*U*ρ*cp*t_i)/(Pot*Q_c*ρ*cp)))/(Q_c*ρ*cp - Q_c*ρ*cp*e^((A_p*Pot*U - A_p*Q_c*U*ρ*cp*t_f + A_p*Q_c*U*ρ*cp*t_i)/(Pot*Q_c*ρ*cp))) = 310.504 K
