# Propiedades del agua
ρ := .99*gm/mL
μno := .01*poise = 0.001 kg/(m*s)
cp := .998*cal/(gm*K)
k := .63*W/(m*K)
μ_f := 2.8*kg/(m*hr) = 0.000777778 kg/(m*s)
μ_c := 1.6*kg/(m*hr) = 0.000444444 kg/(m*s)
μ_f := .007879*poise = 0.0007879 kg/(m*s)
μ_c := .005202*poise
# Geometría del sistema
A := .483 m^2
S := 17 cm*.0025*m = 4.25 cm^2
de := 2*.0025*m = 0.5 cm
# Condiciones de operación
v_f := Q_f/S = 11764.7 1/m^2
v_c := Q_c/S = 25882.4 1/m^2
t_i := (10 + 273.15)*K = 283.15 K  # temperatura inicial del agua fría
T_i := (273.15 K + 66 K) = 339.15 K  # temperatura inicial del agua caliente
# Funciones de matrices
ff(a, b) := 1
ff2(a, b) := a + 1
jj(filas) :=
    vect0 ← matrix(filas, 1, ff)
    vect ← matrix(filas, 1, ff)
    for i ∈ 2 .. filas
        vect ← stack(vect, vect0*i)
    vect
jj2(filas) :=
    vect0 ← matrix(filas, 1, ff2)
    vect ← matrix(filas, 1, ff2)
    for i ∈ 2 .. filas
        vect ← stack(vect, vect0)
    vect
# Adimnsionales
matrix(2, 1, ff2) = [1; 2]
jj(3) = [1; 1; 1; 2; 2; 2; 3; 3; 3]
ff2(2, 1) = 3
jj2(3) = [1; 2; 3; 1; 2; 3; 1; 2; 3]
jj(2) = [1; 1; 2; 2]
Re_c := ρ*v_c*de/μ_c = 246285365 s/m^3
Re_f := ρ*v_f*de/μ_f = 73912037 s/m^3
Pr_f := (μ_f*cp)/k = 5.22569
Pr_c := (μ_c*cp)/k = 3.45019
# Calculo U
μ_c = 0.005202 poise
a := .26
b := 0.65
c := .4
h_f := k/de*a*Re_f^b*Pr_f^c  # error: El operador de exponenciación precisa un exponente constante cuando se aplica a un valor con unidades.
h_c := k/de*a*Re_c^b*Pr_c^c  # error: El operador de exponenciación precisa un exponente constante cuando se aplica a un valor con unidades.
U := (1/h_f + 1/h_c)^-1  # error: Esta variable no está definida.
U(Q_f, Q_c) := (1/(k/de*a*(ρ*Q_f/S*de/μ_f)^b*((μ_f*cp)/k)^c) + 1/(k/de*a*(ρ*Q_c/S*de/μ_c)^b*((μ_c*cp)/k)^c))^-1
U(1*liter/min, 1*liter/min) = 0.0285876 cal/(cm^2*K*s)
# Reuslevo balance de calor
μ_f = 0.007879 poise
(T_i - T_f)*cp*ρ*Q_c == (t_f - t_i)*cp*ρ*Q_f
t_f == (Q_c*T_i - Q_c*T_f + Q_f*t_i)/Q_f
# Intercambiador
ρ*Q_c*cp*(T_i - T_f) == U*A*((T_i - t_f) - (T_f - t_i))/ln((T_i - t_f)/(T_f - t_i))
# Reemplazo tf
T_f := 360.929
-Q_c*ρ*cp*(T_f - T_i) == A*U*(Q_c - Q_f)*(T_f - T_i)/(Q_f*ln((Q_c*T_f - Q_c*T_i + Q_f*T_i - Q_f*t_i)/(Q_f*T_f - Q_f*t_i)))
gg := .999999999
c1 := 362
f(T_f, Q_f, Q_c) := sqrt(((A*U(gg*Q_c*liter/min, Q_f*liter/min)*(gg*Q_c*liter/min - Q_f*liter/min)*(T_f*K - T_i)/(Q_f*liter/min*ln((gg*Q_c*liter/min*T_f*K - gg*Q_c*liter/min*T_i + Q_f*liter/min*T_i - Q_f*liter/min*t_i)/(Q_f*liter/min*T_f*K - Q_f*liter/min*t_i))) + gg*Q_c*liter/min*ρ*cp*(T_f*K - T_i))/W)^2)
x < c1
x := 350
T_f(Q_f, Q_c) := Minimize(f, x)
Q_f ≡ 5
Q_c ≡ 11
T_i = 339.15 K
t_i = 283.15 K
OOOOOOOOOOOOOOOOOOOOOOOOOOOOOOOOOOOOOOOOOOOOOOOOOOOOOOOOO
t_f := (Q_c*T_i - Q_c*T_f(Q_f, Q_c)*K + Q_f*t_i)/Q_f = 338.004 K
T_f(Q_f, Q_c) = 314.216
Func_optim_econ := t_f/K - 4*Q_c/Q_f = 329.204
OOOOOOOOOOOOOOOOOOOOOOOOOOOOOOOOOOOOOOOOOOOOOOOOOOOOOOOOOOO
Qf2 := jj2(15)
Qc2 := jj(15)
Qc2*[303.074; 297.607; 296.724; 315.565; 304.577; 300.505; 321.444; 311.334; 305.556] =  # error: Estas dimensiones de la matriz no coinciden.
Qf2 = [
    1; 2; 3; 4; 5; 6; 7; 8; 9; 10
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]
t_f := (□ + Qf2*liter/min*t_i)/(liter/min*Qf2)  # error: Este marcador de posición está vacío.
Qc2 = [
    1; 1; 1; 1; 1; 1; 1; 1; 1; 1
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]
t_f = 338.004 K
H := augment(Qf2, Qc2) = [
    1, 1;
    2, 1;
    3, 1;
    4, 1;
    5, 1;
    6, 1;
    7, 1;
    8, 1;
    9, 1;
    10, 1
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]
H2 := augment(H)
