# Propiedades del agua
ρ := 1*gm/mL
μno := .01*poise = 0.001 kg/(m*s)
cp := 1*cal/(gm*K)
k := .58*W/(m*K)
μ_f := 2.8*kg/(m*hr) = 0.000777778 kg/(m*s)
μ_c := 1.6*kg/(m*hr) = 0.000444444 kg/(m*s)
# Geometría del sistema
A := .39 m^2
S := 17 cm*.0025*m = 4.25 cm^2
de := 2*.0025*cm = 5e-5 m
# Condiciones de operación
v_f := Q_f/S = 0.0392157 m/s
v_c := Q_c/S = 0.0392157 m/s
t_i := 296 K  # temperatura inicial del agua fría
T_i := (273 K + 61 K) = 334 K  # temperatura inicial del agua caliente
# Adimnsionales
Re_c := ρ*v_c*de/μ_c = 4.41176
Re_f := ρ*v_f*de/μ_f = 2.52101
Pr_f := k/(μ_f*cp) = 0.178111
Pr_c := k/(μ_c*cp) = 0.311694
# Calculo U
a := .26
b := 0.65
c := .4
h_f := k/de*a*Re_f^b*Pr_f^c = 2758.87 kg/(K*s^3)
h_c := k/de*a*Re_c^b*Pr_c^c = 4965.02 kg/(K*s^3)
U := (1/h_f + 1/h_c)^-1 = 1773.44 kg/(K*s^3)
U(Q_f, Q_c) := (1/(k/de*a*(ρ*Q_f/S*de/μ_f)^b*(k/(μ_f*cp))^c) + 1/(k/de*a*(ρ*Q_c/S*de/μ_c)^b*(k/(μ_c*cp))^c))^-1
U(Q_c, Q_f) = 1773.44 kg/(K*s^3)
# Reuslevo balance de calor
(T_i - T_f)*cp*ρ*Q_c == (t_f - t_i)*cp*ρ*Q_f
t_f == (Q_c*T_i - Q_c*T_f + Q_f*t_i)/Q_f
# Intercambiador
ρ*Q_c*cp*(T_i - T_f) == U*A*((T_i - t_f) - (T_f - t_i))/ln((T_i - t_f)/(T_f - t_i))
# Reemplazo tf
-Q_c*ρ*cp*(T_f - T_i) == A*U*(Q_c - Q_f)*(T_f - T_i)/(Q_f*ln((Q_c*T_f - Q_c*T_i + Q_f*T_i - Q_f*t_i)/(Q_f*T_f - Q_f*t_i)))
c1 := 362
f(T_f) := sqrt(((A*U(Q_c, Q_f)*(Q_c - Q_f)*(T_f*K - T_i)/(Q_f*ln((Q_c*T_f*K - Q_c*T_i + Q_f*T_i - Q_f*t_i)/(Q_f*T_f*K - Q_f*t_i))) + Q_c*ρ*cp*(T_f*K - T_i))/W)^2)
t_i = 296 K
T_i = 334 K
x < c1
x := 350
T_f := Minimize(f, x)
Q_f ≡ .9999999999*liter/min
Q_c ≡ 1*liter/min
T_f = 299.482
g[0] =  # error: Este valor debe ser un vector.
T_f*K = 299.482 K
t_f := (Q_c*T_i - Q_c*T_f*K + Q_f*t_i)/Q_f = 330.518 K
t_f = 330.518 K
