# Propiedades del agua
ρ := .99*gm/mL
μno := .01*poise = 0.001 kg/(m*s)
cp := .998*cal/(gm*K)
k := .63*W/(m*K) = 0.00150473 cal/(cm*K*s)
μ_f := 1.875*kg/(m*hr) = 0.00520833 poise
μ_c := 2.8*kg/(m*hr) = 0.00777778 poise
1*poise = 100 gm/(m*s)
μ_f := .007879*poise = 0.0007879 kg/(m*s)
μ_c := .005202*poise
# Geometría del sistema
A := .483 m^2
S := 17 cm*.0025*m = 4.25 cm^2
de := 2*.0025*m = 0.005 m
# Condiciones de operación
v_f := Q_f/S = 0.0784314 m/s
v_c := Q_c/S = 0.0392157 m/s
t_i := (273 + 10)*K  # temperatura inicial del agua fría
T_i := (273 K + 66 K) = 339 K  # temperatura inicial del agua caliente
.005202*.99889/.00154 = 3.37417
# Adimnsionales
Re_c := ρ*v_c*de/μ_c = 373.16
Re_f := ρ*v_f*de/μ_f = 492.747
Pr_f := (μ_f*cp)/k = 5.22569
cp = 0.998 cal/(gm*K)
Pr_c := (μ_c*cp)/k = 3.45019
# Calculo U
a := .26
b := 0.65
c := .4
Re_c = 373.16
a*Re_f^b*Pr_f^c = 28.3424
a*Re_c^b*Pr_c^c = 20.0374
Pr_c = 3.45019
h_f := k/de*a*Re_f^b*Pr_f^c = 0.0852952 cal/(cm^2*K*s)
h_c := k/de*a*Re_c^b*Pr_c^c = 0.0603018 cal/(cm^2*K*s)
U := (1/h_f + 1/h_c)^-1 = 1479.06 kg/(K*s^3)
U(Q_f, Q_c) := (1/(k/de*a*(ρ*Q_f/S*de/μ_f)^b*((μ_f*cp)/k)^c) + 1/(k/de*a*(ρ*Q_c/S*de/μ_c)^b*((μ_c*cp)/k)^c))^-1
U(1*liter/min, 1*liter/min) = 0.0285876 cal/(cm^2*K*s)
# Reuslevo balance de calor
(T_i - T_f)*cp*ρ*Q_c == (t_f - t_i)*cp*ρ*Q_f
t_f == (Q_c*T_i - Q_c*T_f + Q_f*t_i)/Q_f
# Intercambiador
ρ*Q_c*cp*(T_i - T_f) == U*A*((T_i - t_f) - (T_f - t_i))/ln((T_i - t_f)/(T_f - t_i))
# Reemplazo tf
-Q_c*ρ*cp*(T_f - T_i) == A*U*(Q_c - Q_f)*(T_f - T_i)/(Q_f*ln((Q_c*T_f - Q_c*T_i + Q_f*T_i - Q_f*t_i)/(Q_f*T_f - Q_f*t_i)))
c1 := 362
f(T_f) := sqrt(((A*U(Q_c, Q_f)*(Q_c - Q_f)*(T_f*K - T_i)/(Q_f*ln((Q_c*T_f*K - Q_c*T_i + Q_f*T_i - Q_f*t_i)/(Q_f*T_f*K - Q_f*t_i))) + Q_c*ρ*cp*(T_f*K - T_i))/W)^2)
t_i = 9.85 °C
T_i = 65.85 °C
x < c1
x := 300
T_f := Minimize(f, x)
Q_f ≡ 2*liter/min
Q_c ≡ 0.999999999999*liter/min
T_f = 283.178
g[0] =  # error: Este valor debe ser un vector.
T_f*K = 283.178 K
t_f := (Q_c*T_i - Q_c*T_f*K + Q_f*t_i)/Q_f = 310.911 K
t_f = 310.911 K
