# Propiedades del agua
ρ := 1*gm/mL
μno := .01*poise = 0.001 kg/(m*s)
cp := 1*cal/(gm*K)
k := .58*W/(m*K)
μ_f := 2.8*kg/(m*hr) = 0.000777778 kg/(m*s)
μ_c := 1.6*kg/(m*hr) = 0.000444444 kg/(m*s)
# Geometría del sistema
A := .39 m^2
S := 17 cm*.0025*m = 4.25 cm^2
de := S/((40 cm + 1 cm)*2) = 0.0518293 cm
# Condiciones de operación
v_f := Q_f/S
v_c := Q_c/S  # error: Este valor debe ser un escalar o una matriz.
t_i := 296 K  # temperatura inicial del agua fría
T_i := (273 K + 61 K) = 334 K  # temperatura inicial del agua caliente
# Adimnsionales
Re_c := ρ*v_c*de/μ_c
Re_f := ρ*v_f*de/μ_f
Pr_f := k/(μ_f*cp) = 0.178111
Pr_c := k/(μ_c*cp) = 0.311694
# Calculo U
a := .26
b := 0.65
c := .4
h_f := k/de*a*Re_f^b*Pr_f^c
h_c := k/de*a*Re_c^b*Pr_c^c
U := (1/h_f + 1/h_c)^-1
U(Q_f, Q_c) := (1/(k/de*a*(ρ*Q_f/S*de/μ_f)^b*(k/(μ_f*cp))^c) + 1/(k/de*a*(ρ*Q_c/S*de/μ_c)^b*(k/(μ_c*cp))^c))^-1
U(Q_c, Q_f) =  # error: Esta función se refiere a sí misma de forma incoherente.
# Reuslevo balance de calor
(T_i - T_f)*cp*ρ*Q_c == (t_f - t_i)*cp*ρ*Q_f
t_f == (Q_c*T_i - Q_c*T_f + Q_f*t_i)/Q_f
# Intercambiador
ρ*Q_c*cp*(T_i - T_f) == U*A*((T_i - t_f) - (T_f - t_i))/ln((T_i - t_f)/(T_f - t_i))
# Reemplazo tf
T_f := 360.929
-Q_c*ρ*cp*(T_f - T_i) == A*U*(Q_c - Q_f)*(T_f - T_i)/(Q_f*ln((Q_c*T_f - Q_c*T_i + Q_f*T_i - Q_f*t_i)/(Q_f*T_f - Q_f*t_i)))
gg := .999999999
c1 := 362
f(T_f, Q_f, Q_c) := sqrt(((A*U(gg*Q_c*liter/min, Q_f*liter/min)*(gg*Q_c*liter/min - Q_f*liter/min)*(T_f*K - T_i)/(Q_f*liter/min*ln((gg*Q_c*liter/min*T_f*K - gg*Q_c*liter/min*T_i + Q_f*liter/min*T_i - Q_f*liter/min*t_i)/(Q_f*liter/min*T_f*K - Q_f*liter/min*t_i))) + gg*Q_c*liter/min*ρ*cp*(T_f*K - T_i))/W)^2)
Q_c*ρ*cp*(T_f*K - T_i) = [112746337; 225492674; 338239012] Pa
x < c1
x := 350
T_f(Q_f, Q_c) := Minimize(f, x)
A*U(Q_c, Q_f*liter/min)*(Q_c - Q_f*liter/min)*(T_f*K - T_i)/(Q_f*ln((Q_c*T_f*K - Q_c*T_i + Q_f*liter/min*T_i - Q_f*liter/min*t_i)/(Q_f*liter/min*T_f*K - Q_f*liter/min*t_i))) =  # error: Este valor debe ser un escalar.
Q_f ≡ (1 .. 2)
Q_c ≡ (1 .. 3)
T_i = 334 K
t_i = 296 K
T_f(Q_f, Q_c) = [303.074; 297.607; 315.565; 304.577; 321.444; 311.334]
unos := [1; 1; 1; 1]
t_f - 273 K =  # error: Esta variable no está definida.
Q_c = [1; 2; 3]
t_f := (Q_c*liter/min*T_i - Q_c*liter/min*T_f(Q_f, Q_c)*K + Q_f*liter/min*t_i)/(liter/min*Q_f)  # error: Este valor debe ser un escalar o una matriz.
Q_c*liter/min*T_i = [0.00556667; 0.0111333; 0.0167] K*m^3/s
Q_c*liter/min*T_f(Q_f, Q_c)*K = [0.00505123; 0.0105188; 0.0160722; 0.00496012; 0.0101526; 0.0155667] K*m^3/s
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