# Propiedades del agua
ρ := 1*gm/mL
μno := .01*poise = 0.001 kg/(m*s)
cp := 1*cal/(gm*K)
k := .58*W/(m*K)
μ_f := 2.8*kg/(m*hr) = 0.000777778 kg/(m*s)
μ_c := 1.6*kg/(m*hr) = 0.000444444 kg/(m*s)
# Geometría del sistema
A := .39 m^2
S := 17 cm*.0025*m = 4.25 cm^2
de := S/((40 cm + 1 cm)*2) = 0.0518293 cm
# Condiciones de operación
v_f := Q_f/S  # error: Este valor debe ser un escalar o una matriz.
v_c := Q_c/S  # error: Este valor debe ser un escalar o una matriz.
t_i := 296 K  # temperatura inicial del agua fría
T_i := (273 K + 61 K) = 334 K  # temperatura inicial del agua caliente
# Funciones de matrices
ff(a, b) := 1
ff2(a, b) := a + 1
jj(filas) :=
    vect0 ← matrix(filas, 1, ff)
    vect ← matrix(filas, 1, ff)
    for i ∈ 2 .. filas
        vect ← stack(vect, vect0*i)
    vect
jj2(filas) :=
    vect0 ← matrix(filas, 1, ff2)
    vect ← matrix(filas, 1, ff2)
    for i ∈ 2 .. filas
        vect ← stack(vect, vect0)
    vect
# Adimnsionales
matrix(2, 1, ff2) = [1; 2]
jj(3) = [1; 1; 1; 2; 2; 2; 3; 3; 3]
ff2(2, 1) = 3
jj2(3) = [1; 2; 3; 1; 2; 3; 1; 2; 3]
jj(2) = [1; 1; 2; 2]
Re_c := ρ*v_c*de/μ_c  # error: Esta variable no está definida.
Re_f := ρ*v_f*de/μ_f  # error: Esta variable no está definida.
Pr_f := k/(μ_f*cp) = 0.178111
Pr_c := k/(μ_c*cp) = 0.311694
# Calculo U
a := .26
b := 0.65
c := .4
h_f := k/de*a*Re_f^b*Pr_f^c  # error: Esta variable no está definida.
h_c := k/de*a*Re_c^b*Pr_c^c  # error: Esta variable no está definida.
U := (1/h_f + 1/h_c)^-1  # error: Esta variable no está definida.
U(Q_f, Q_c) := (1/(k/de*a*(ρ*Q_f/S*de/μ_f)^b*(k/(μ_f*cp))^c) + 1/(k/de*a*(ρ*Q_c/S*de/μ_c)^b*(k/(μ_c*cp))^c))^-1
U(Q_c, Q_f) =  # error: Esta función se refiere a sí misma de forma incoherente.
# Reuslevo balance de calor
(T_i - T_f)*cp*ρ*Q_c == (t_f - t_i)*cp*ρ*Q_f
t_f == (Q_c*T_i - Q_c*T_f + Q_f*t_i)/Q_f
# Intercambiador
ρ*Q_c*cp*(T_i - T_f) == U*A*((T_i - t_f) - (T_f - t_i))/ln((T_i - t_f)/(T_f - t_i))
# Reemplazo tf
T_f := 360.929
-Q_c*ρ*cp*(T_f - T_i) == A*U*(Q_c - Q_f)*(T_f - T_i)/(Q_f*ln((Q_c*T_f - Q_c*T_i + Q_f*T_i - Q_f*t_i)/(Q_f*T_f - Q_f*t_i)))
gg := .999999999
c1 := 362
f(T_f, Q_f, Q_c) := sqrt(((A*U(gg*Q_c*liter/min, Q_f*liter/min)*(gg*Q_c*liter/min - Q_f*liter/min)*(T_f*K - T_i)/(Q_f*liter/min*ln((gg*Q_c*liter/min*T_f*K - gg*Q_c*liter/min*T_i + Q_f*liter/min*T_i - Q_f*liter/min*t_i)/(Q_f*liter/min*T_f*K - Q_f*liter/min*t_i))) + gg*Q_c*liter/min*ρ*cp*(T_f*K - T_i))/W)^2)
x < c1
x := 350
T_f(Q_f, Q_c) := Minimize(f, x)
Q_f ≡ (1 .. 3)
Q_c ≡ (1 .. 3)
T_i = 334 K
t_i = 296 K
T_f(Q_f, Q_c) = [303.074; 297.607; 296.724; 315.565; 304.577; 300.505; 321.444; 311.334; 305.556]
[303.074; 297.607; 315.565; 304.577]
Tf2 := T_f(Q_f, Q_c)  # error: No se ha encontrado solución. Inténtelo cambiando el valor de prueba o el valor de TOL o CTOL.
Qc2 := jj(3)
Qf2 := jj2(3)
Qf2 = [1; 2; 3; 1; 2; 3; 1; 2; 3]
Qc2 = [1; 1; 1; 2; 2; 2; 3; 3; 3]
t_f := (Qc2*liter/min*T_i - vectorize(Qc2*[303.074; 297.607; 296.724; 315.565; 304.577; 300.505; 321.444; 311.334; 305.556])*liter/min*K + Qf2*liter/min*t_i)/(liter/min*Qf2) = [326.926; 314.197; 308.425; 332.87; 325.423; 318.33; 333.668; 329.999; 324.444] K
Qc2 = [1; 1; 1; 2; 2; 2; 3; 3; 3]
Qc2*[303.074; 297.607; 296.724; 315.565; 304.577; 300.505; 321.444; 311.334; 305.556] = 5553.7
