# Propiedades del agua
ρ := 1*gm/mL
μ := .01*poise
cp := 1*cal/(gm*K)
k := .58*W/(m*K)
# Geometría del sistema
A_p := 1 m^2
A_t := 1 m^2
S := 400 cm^2
de := S/((40 cm + 1 cm)*2) = 4.87805 cm
# Condiciones de operación
Q_f := 10*liter/min
Q_c := 20*liter/min
v_f := Q_f/S = 0.00416667 m/s
v_c := Q_c/S = 0.00833333 m/s
t_i := 298 K  # temperatura inicial del agua
T_v := 373 K  # temperatura del vapor
# Datos de trasnferenca de calor en el tanque
h_t := 58.244*1/(K*m^2)*W
# Adimnsionales
Re_c := ρ*v_c*de/μ = 406.504
Re_f := ρ*v_f*de/μ = 203.252
Pr := k/(μ*cp) = 0.138531
# Calculo U
a := .2883
b := 0.657
c := 1/3
h_f := k/de*a*Re_f^b*Pr^c
h_c := k/de*a*Re_c^b*Pr^c
U := (1/h_f + 1/h_c)^-1
# Reuslevo para el tanque
(T_i - T_f)*cp*ρ*Q_c == h_t*A_t*(T_v - T_i)
T_i == (A_t*T_v*h_t + Q_c*T_f*ρ*cp)/(A_t*h_t + Q_c*ρ*cp)
# Balance de calor corriente fría
(t_f - t_i)*cp*ρ*Q_f == h_t*A_t*(T_v - T_i)
t_f == (A_t*T_v*h_t - A_t*T_i*h_t + Q_f*ρ*cp*t_i)/(Q_f*ρ*cp)
# Intercambiador
ρ*Q_c*cp*(T_i - T_f) == U*A_p*((T_i - t_f) - (T_f - t_i))/ln((T_i - t_f)/(T_f - t_i))
# reemplazo tf
-Q_c*ρ*cp*(T_f - T_i) == (A_p*A_t*T_i*U*h_t - A_p*A_t*T_v*U*h_t - A_p*Q_f*T_f*U*ρ*cp + A_p*Q_f*T_i*U*ρ*cp)/(Q_f*ρ*cp*ln((A_t*T_i*h_t - A_t*T_v*h_t + Q_f*T_i*ρ*cp - Q_f*ρ*cp*t_i)/(Q_f*T_f*ρ*cp - Q_f*ρ*cp*t_i)))
# Reemplazo Ti
-A_t*Q_c*ρ*cp*h_t*(T_f - T_v)/(A_t*h_t + Q_c*ρ*cp) == A_p*A_t*U*h_t*(Q_c - Q_f)*(T_f - T_v)/(Q_f*ln((A_t*Q_c*T_f*h_t - A_t*Q_c*T_v*h_t + A_t*Q_f*T_v*h_t - A_t*Q_f*h_t*t_i + Q_c*Q_f*T_f*ρ*cp - Q_c*Q_f*ρ*cp*t_i)/(A_t*Q_f*T_f*h_t - A_t*Q_f*h_t*t_i + Q_c*Q_f*T_f*ρ*cp - Q_c*Q_f*ρ*cp*t_i))*(A_t*h_t + Q_c*ρ*cp))
ρ*Q_c*cp*(T_i - T_f) == U*A_p*((T_i - t_f) - (T_f - t_i))/ln((T_i - t_f)/(T_f - t_i))
Pot == (A_p*Pot*U - A_p*Q_c*U*ρ*cp*t_f + A_p*Q_c*U*ρ*cp*t_i)/(Q_c*ρ*cp*ln((Pot + Q_c*T_f*ρ*cp - Q_c*ρ*cp*t_f)/(Q_c*T_f*ρ*cp - Q_c*ρ*cp*t_i)))
# Reemplazo
T_i == (Pot + Q_c*T_f*ρ*cp)/(Q_c*ρ*cp)
Pot == (A_p*Pot*U - A_p*Q_c*U*ρ*cp*t_f + A_p*Q_c*U*ρ*cp*t_i)/(Q_c*ρ*cp*ln((Pot + Q_c*T_f*ρ*cp - Q_c*ρ*cp*t_f)/(Q_c*T_f*ρ*cp - Q_c*ρ*cp*t_i)))
-(Pot - Q_c*ρ*cp*t_f + Q_c*ρ*cp*t_i*e^((A_p*Pot*U - A_p*Q_c*U*ρ*cp*t_f + A_p*Q_c*U*ρ*cp*t_i)/(Pot*Q_c*ρ*cp)))/(Q_c*ρ*cp - Q_c*ρ*cp*e^((A_p*Pot*U - A_p*Q_c*U*ρ*cp*t_f + A_p*Q_c*U*ρ*cp*t_i)/(Pot*Q_c*ρ*cp))) =  # error: Esta variable no está definida.
